New "Line.ug_line" bus1=sourcebus bus2=ug_20kv_bb Seasons=1 Ratings=[400,] emergamps=600 r0=0 length=3 C0=3.183099E-009 normamps=400.0 x0=1E-009 B0=1E-009 x1=1E-009 B1=3.141593E-010 r1=0 C1=1E-009 enabled=true
New "Line.rs_line" bus1=sourcebus bus2=rs_20kv_bb Seasons=1 Ratings=[400,] emergamps=600 r0=0 length=3 C0=3.183099E-009 normamps=400.0 x0=1E-009 B0=1E-009 x1=1E-009 B1=3.141593E-010 r1=0 C1=1E-009 enabled=true
New "Line.ev-charge_line" bus1=rs_04kv_bb bus2=ev-charge_bb Seasons=1 Ratings=[400,] emergamps=600 r0=0 length=0.05 C0=3.183099E-009 normamps=400.0 x0=1E-009 B0=1E-009 x1=1E-009 B1=3.141593E-010 r1=0 C1=1E-009 enabled=true
New "Line.res-wpg_line" bus1=sourcebus bus2=res-wpg_bb Seasons=1 Ratings=[400,] emergamps=600 r0=0 length=2 C0=3.183099E-009 normamps=400.0 x0=1E-009 B0=1E-009 x1=1E-009 B1=3.141593E-010 r1=0 C1=1E-009 enabled=true
New "Line.user_line" bus1=res_bb bus2=user_bb Seasons=1 Ratings=[400,] emergamps=600 r0=0 length=0.1 C0=3.183099E-009 normamps=400.0 x0=1E-009 B0=1E-009 x1=1E-009 B1=3.141593E-010 r1=0 C1=1E-009 enabled=true
New "Line.pros_line" bus1=res_bb bus2=pros_bb Seasons=1 Ratings=[400,] emergamps=600 r0=0 length=0.05 C0=3.183099E-009 normamps=400.0 x0=1E-009 B0=1E-009 x1=1E-009 B1=3.141593E-010 r1=0 C1=1E-009 enabled=true
New "Line.wpg_line" bus1=wpg_1_bb bus2=wpg_2_bb Seasons=1 Ratings=[400,] emergamps=600 r0=0 length=1 C0=3.183099E-009 normamps=400.0 x0=1E-009 B0=1E-009 x1=1E-009 B1=3.141593E-010 r1=0 C1=1E-009 enabled=true
New "Line.pros-ev_dc-line" linecode=dc-line bus1=pros1_dc-bb bus2=ev-fast_dc-bb Seasons=1 Ratings=[400,] emergamps=600 normamps=400.0 length=0.02 enabled=true
